# 1. Задание исходных данных
g := 32.174  # - ускорение свободного падения
W1 := 20000  # - вес самолета
Cd := 0.02  # - коэффицент сопротивления
Cl := 0.1  # - коэффицент подъемной силы
S := 160  # - площадь крыльев
# 2. Начальные условия
y[0] := [1500; 15*π/180]
# 3. Дифференцирование системы однородных уравнений
F(t, y) := [
    g*((1 + 1/2*e^(-(y[0]*10^-3 - 1.5)^2))*(10^4 - 0.27*t) - W1*sin(y[1]) - 1/2*S*y[0]^2*Cd*2.3769*10^-3*e^(-(t/(2.36*10^4))))/(W1*y[0]*sin(y[1]));
    g*(1/2*S*y[0]^2*Cl*2.3769*10^-3*e^(-(t/(2.36*10^4))) - W1*cos(y[1]))/(W1*y[0]^2*sin(y[1]))
]
Z := rkfixed(y[0], 5000, 25000, 40, F)
# 4. Построение таблицы значений
Z[:, 3] := 500/tan(Z[:, 2])  # - расстояние, пройденное самолетом за один шаг
Z[:, 2] := 180/π*Z[:, 2]  # - перевод радиан в градусы
Y := Z[:, 3]
X[0] := 1.866*10^3
i := 1 .. 40
X[i] := Y[i] + X[i - 1]  # - расстояние, пройденное самолетом от начала координат
Z[:, 3] := X
Z = [
    5000, 1500, 15, 1866;
    5500, 1501.29, 16.1449, 3593.21;
    6000, 1501.7, 17.1747, 5210.97;
    6500, 1501.39, 18.1083, 6739.98;
    7000, 1500.5, 18.9592, 8195.45;
    7500, 1499.11, 19.7379, 9588.99;
    8000, 1497.3, 20.4522, 10929.7;
    8500, 1495.12, 21.1087, 12224.9;
    9000, 1492.61, 21.7124, 13480.6;
    9500, 1489.8, 22.2675, 14701.7
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]
# 5. Построение траектории движения сверхзвукового самолета
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